clock {
	timezone PST+8PDT;
	starttime '2005-01-01 00:00:00 PST';
}

module residential;
object house:..100 {
	object waterheater { };
}
module tape;
object collector {
	file waterheater.csv;
	group "class=waterheater";
	property "sum(power.mag)";
	interval 3600;
	limit 768;
}
